<?xml version="1.0" encoding="utf-8" ?>
<!--
    This file is part of extra500

    The extra500 is free software: you can redistribute it and/or modify
    it under the terms of the GNU General Public License as published by
    the Free Software Foundation, either version 2 of the License, or
    (at your option) any later version.

    The extra500 is distributed in the hope that it will be useful,
    but WITHOUT ANY WARRANTY; without even the implied warranty of
    MERCHANTABILITY or FITNESS FOR A PARTICULAR PURPOSE.  See the
    GNU General Public License for more details.

    You should have received a copy of the GNU General Public License
    along with extra500.  If not, see <http://www.gnu.org/licenses/>.

      Author: Dirk Dittmann
      Date: 2013-03-13

      Last change:      Eric van den Berg
      Date:             28.04.13
-->

<!--
	Manufacturer	: MT-Propeller
	Model			: MTV-5-1-D-C-F-R(A)/CFR210-56
-->

<propeller name="propeller_MTV-5-1-D-C-F-R(A)">
<!--  MTV-5-1/210-56 - real -->
   <ixx> 4.216 </ixx>
  <diameter unit="IN"> 82.677 </diameter>
  <numblades> 5 </numblades>
  <gearratio> 16.4 </gearratio>
  <reversepitch> -20 </reversepitch>
  <minpitch> 2 </minpitch>
  <maxpitch> 85 </maxpitch>
  <minrpm> 1850 </minrpm>
  <maxrpm> 2030 </maxrpm>
  <constspeed> 1 </constspeed>
  <p_factor> 6.53 </p_factor>
 <ct_factor> 1.0 </ct_factor>
  <cp_factor> 1.0 </cp_factor>

 <!-- thrust coefficient as a function of advance ratio and blade angle -->
  <table name="C_THRUST" type="internal">
      <tableData>
	-20	-10	0	5	10	15	20	25	30	35	40	45
0.0	-0.02	0.0	0.073	0.135	0.19	0.234	0.248	0.248	0.244	0.238	0.232	0.222
0.1	-0.04	-0.01	0.063	0.125	0.184	0.23	0.248	0.249	0.244	0.239	0.232	0.222
0.2	-0.06	-0.02	0.042	0.105	0.169	0.222	0.248	0.25	0.245	0.241	0.233	0.223
0.3	-0.09	-0.045	0.02	0.08	0.15	0.21	0.245	0.253	0.248	0.243	0.235	0.224
0.4	-0.12	-0.07	-0.002	0.055	0.125	0.195	0.241	0.255	0.252	0.247	0.238	0.227
0.5	-0.135	-0.095	-0.024	0.025	0.097	0.17	0.232	0.256	0.256	0.25	0.242	0.231
0.6	-0.15	-0.12	-0.046	-0.005	0.065	0.145	0.217	0.256	0.26	0.256	0.248	0.236
0.7	-0.155	-0.13	-0.068	-0.035	0.03	0.112	0.193	0.25	0.264	0.261	0.253	0.242
0.8	-0.16	-0.14	-0.09	-0.065	-0.005	0.078	0.163	0.238	0.266	0.266	0.26	0.248
0.9	-0.185	-0.155	-0.112	-0.095	-0.04	0.04	0.13	0.215	0.265	0.272	0.265	0.255
1.0	-0.21	-0.17	-0.134	-0.125	-0.075	0	0.095	0.189	0.258	0.277	0.273	0.263
1.1	-0.24	-0.185	-0.156	-0.155	-0.11	-0.04	0.06	0.158	0.242	0.279	0.28	0.271
1.2	-0.265	-0.2	-0.178	-0.185	-0.145	-0.08	0.02	0.124	0.218	0.278	0.286	0.279
1.3	-0.3	-0.23	-0.2	-0.215	-0.18	-0.12	-0.02	0.088	0.19	0.27	0.291	0.287
1.4	-0.34	-0.26	-0.222	-0.245	-0.215	-0.16	-0.06	0.05	0.16	0.254	0.295	0.295
1.5	-0.39	-0.29	-0.244	-0.275	-0.25	-0.2	-0.1	0.01	0.125	0.232	0.293	0.302
1.6	-0.44	-0.32	-0.266	-0.305	-0.285	-0.24	-0.14	-0.03	0.09	0.205	0.288	0.308
1.7	-0.5	-0.36	-0.288	-0.335	-0.32	-0.28	-0.18	-0.07	0.055	0.175	0.275	0.312
1.8	-0.555	-0.4	-0.31	-0.365	-0.355	-0.32	-0.22	-0.11	0.015	0.145	0.258	0.315
1.9	-0.62	-0.45	-0.332	-0.395	-0.39	-0.36	-0.26	-0.15	-0.025	0.11	0.235	0.312
2.0	-0.7	-0.51	-0.354	-0.425	-0.425	-0.4	-0.3	-0.19	-0.065	0.075	0.21	0.307
2.1	-0.78	-0.57	-0.376	-0.455	-0.46	-0.44	-0.34	-0.23	-0.105	0.04	0.18	0.296
2.2	-0.86	-0.63	-0.398	-0.485	-0.495	-0.48	-0.38	-0.27	-0.145	0	0.15	0.28
2.3	-0.96	-0.705	-0.42	-0.515	-0.53	-0.52	-0.42	-0.31	-0.185	-0.04	0.12	0.261
2.4	-1.06	-0.78	-0.442	-0.545	-0.565	-0.56	-0.46	-0.35	-0.225	-0.08	0.09	0.24
      </tableData>
  </table>

   <!-- power coefficient as a function of advance ratio and blade angle -->
  <table name="C_POWER" type="internal">
     <tableData>
	-20	-10	0	5	10	15	20	25	30	35	40	45
0.0	0.02	0.01	0.030	0.060	0.095	0.135	0.160	0.196	0.240	0.301	0.380	0.475
0.1	0.03	0.015	0.028	0.059	0.095	0.137	0.163	0.198	0.240	0.299	0.375	0.465
0.2	0.04	0.02	0.025	0.054	0.093	0.139	0.171	0.200	0.242	0.297	0.370	0.458
0.3	0.0405	0.015	0.020	0.046	0.090	0.140	0.181	0.210	0.245	0.298	0.363	0.450
0.4	0.041	0.01	0.011	0.036	0.082	0.138	0.190	0.220	0.253	0.300	0.361	0.442
0.5	0.06	0.0	0.000	0.021	0.070	0.132	0.195	0.235	0.262	0.308	0.363	0.440
0.6	0.08	-0.01	-0.011	0.003	0.055	0.120	0.194	0.248	0.275	0.315	0.370	0.438
0.7	0.105	-0.005	-0.022	-0.010	0.033	0.100	0.183	0.260	0.293	0.328	0.377	0.441
0.8	0.13	0.0	-0.033	-0.023	0.005	0.076	0.170	0.262	0.313	0.342	0.389	0.449
0.9	0.135	0.01	-0.044	-0.036	-0.023	0.047	0.148	0.255	0.331	0.362	0.403	0.458
1.0	0.2	0.02	-0.055	-0.049	-0.051	0.010	0.115	0.238	0.341	0.387	0.422	0.472
1.1	0.24	0.045	-0.066	-0.062	-0.079	-0.030	0.080	0.210	0.339	0.412	0.448	0.492
1.2	0.28	0.07	-0.077	-0.075	-0.107	-0.070	0.038	0.170	0.321	0.430	0.474	0.515
1.3	0.33	0.95	-0.088	-0.088	-0.135	-0.110	-0.004	0.130	0.295	0.440	0.500	0.541
1.4	0.38	0.12	-0.099	-0.101	-0.163	-0.150	-0.046	0.080	0.260	0.438	0.530	0.570
1.5	0.43	0.15	-0.110	-0.114	-0.191	-0.190	-0.088	0.024	0.215	0.418	0.555	0.608
1.6	0.48	0.18	-0.121	-0.127	-0.219	-0.230	-0.130	-0.032	0.165	0.383	0.568	0.640
1.7	0.54	0.22	-0.132	-0.140	-0.247	-0.270	-0.172	-0.088	0.108	0.342	0.568	0.678
1.8	0.6	0.26	-0.143	-0.153	-0.275	-0.310	-0.214	-0.144	0.045	0.295	0.553	0.710
1.9	0.665	0.295	-0.154	-0.166	-0.303	-0.350	-0.256	-0.200	-0.018	0.240	0.525	0.738
2.0	0.73	0.33	-0.165	-0.179	-0.331	-0.390	-0.298	-0.256	-0.081	0.175	0.484	0.753
2.1	0.805	0.385	-0.176	-0.192	-0.359	-0.430	-0.340	-0.312	-0.144	0.110	0.438	0.755
2.2	0.88	0.44	-0.187	-0.205	-0.387	-0.470	-0.382	-0.368	-0.207	0.035	0.380	0.740
2.3	0.96	0.5	-0.198	-0.218	-0.415	-0.510	-0.424	-0.424	-0.270	-0.040	0.320	0.715
2.4	1.4	0.56	-0.209	-0.231	-0.443	-0.550	-0.466	-0.480	-0.333	-0.115	0.250	0.675
    </tableData>
  </table>


<!-- thrust effects of helical tip Mach -->
<table name="CT_MACH" type="internal">
  <tableData>
    0.85   1.0
    1.05   0.8
  </tableData>
</table>

<!-- power-required effects of helical tip Mach -->
<table name="CP_MACH" type="internal">
  <tableData>
    0.85   1.0
    1.05   1.8
    2.00   1.4
  </tableData>
</table>

</propeller>
